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/batch
! ANSYS input file written by Workbench version 18.1 RELEASE
! File used for geometry attach: C:\Users\z5020362\Desktop\Uni\BoltHole Geom\IsoBoltHoleNoSplit.SLDPRT
/title,Standard Bolted Hole--Static Structural (G5)
/com,--- Data in consistent NMM units. See Solving Units in the help system for more information.
/units,MPA
/prep7
! Turn off shape checking because checks already performed inside WB mesher.
! See help system for more information.
SHPP,OFF,,NOWARN
etcon,set             ! allow ANSYS to choose best KEYOP's for 180x elements
/com,*********** Nodes for the whole assembly ***********
nblock,3,,2244
(1i9,3e20.9e3)
        1    4.691736454E-001    9.265370399E+001    0.000000000E+000
        2    1.234722982E+000    9.191286156E+001    0.000000000E+000
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-1
/com,*********** Elements for Body 1 "IsoBoltHoleNoSplit" ***********
et,1,185
eblock,19,solid,,952
(19i9)
        1        1        1        1        0        0        0        0        8        0        1      871      884     1993     1994      898      885     1835     1836
        1        1        1        1        0        0        0        0        8        0        2      858      871     1994     1995      911      898     1836     1834
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-1
/com,*********** Send User Defined Coordinate System(s) ***********
csys,0
toffst,273.15,  ! Temperature offset from absolute zero
/com,*********** Set Reference Temperature ***********
tref,22.
/com,*********** Send Materials ***********
MP,DENS,1,7.85e-09,	! tonne mm^-3
MP,ALPX,1,1.2e-05,	! C^-1
MP,C,1,434000000,	! mm^2 s^-2 C^-1
MP,KXX,1,60.5,	! tonne mm s^-3 C^-1
MP,RSVX,1,0.00017,	! ohm mm
MP,EX,1,200000,	! tonne s^-2 mm^-1
MP,NUXY,1,0.3,
MP,MURX,1,10000,

!************************* Model Summary ********************
!IsoBoltHoleNoSplit,	Structural Steel,	matid,	1
!************************* End Model Summary ********************
/com,******* Constant Zero Displacement X *******
CMBLOCK,_DISPZEROUX,NODE,       84
(8i10)
      1850      1851      1852      1853      1854      1855      1856      1857
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cmsel,s,_DISPZEROUX
d,all,ux,0
nsel,all
/com,*********** Define Force Using Surface Effect Elements ***********
local,12,0,0.,0.,0.,-0.,0.,0.
csys,0
et,2,154
eblock,10,,,14
(15i9)
      953        2        2        2       12     1938     1883     1884     1925
      954        2        2        2       12     1937     1882     1883     1938
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-1
esel,s,type,,2
keyop,2,2,1                ! Apply load in local coordinate system
keyop,2,7,1                ! Use original area so load is constant in large deformation
keyop,2,11,2               ! Use real and not project area
esel,all

*DIM,_loadvari67x,TABLE,2,1,1,TIME,
! Time values
_loadvari67x(1,0,1) = 0.
_loadvari67x(2,0,1) = 1.
! Load values
_loadvari67x(1,1,1) = 0.
_loadvari67x(2,1,1) = 0.


*DIM,_loadvari67y,TABLE,2,1,1,TIME,
! Time values
_loadvari67y(1,0,1) = 0.
_loadvari67y(2,0,1) = 1.
! Load values
_loadvari67y(1,1,1) = 0.
_loadvari67y(2,1,1) = -1.73611111111111e-002


*DIM,_loadvari67z,TABLE,2,1,1,TIME,
! Time values
_loadvari67z(1,0,1) = 0.
_loadvari67z(2,0,1) = 1.
! Load values
_loadvari67z(1,1,1) = 0.
_loadvari67z(2,1,1) = 0.

/com,*********** Send Compression Only Support ***********
*set,tid,4
*set,cid,3
et,cid,174
et,tid,170
r,tid
r,cid
eblock,10,,,68
(15i9)
      967        3        3        3        0     1775     1973     1974     1773
      968        3        3        3        0     1974     1988     1774     1773
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-1
! Replicate nodes at the same location
nblock,3
(1i9,3e20.9e3)
     2041    1.482812429E+001    8.080918271E+001    1.600000000E+000
     2042    1.482865844E+001    8.079762642E+001    0.000000000E+000
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-1
! Send replicated elements
eblock,10,,,68
(15i9)
     1035        4        3        4        0     2042     2041     2044     2043
     1036        4        3        4        0     2045     2043     2044     2046
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-1
keyo,cid,10,1              ! Never Adjust Contact Stiffness
esel,s,type,,tid
nele
*set,_nlow,2177
n,_nlow,18.0406769873935,80.4214902274929,0.799999999999999
d,_nlow,all
mat,cid
type,tid
real,cid
tshape,pilot
en,1103,_nlow           ! pilot element needed to get moment reactions
tshape
_npilot65=_nlow
eall
nall
fini
/com,****************************************************************************
/com,*************************    SOLUTION       ********************************
/com,****************************************************************************
/solu
antype,0                   ! static analysis
eqsl,sparse,,,,,1
cntr,print,1               ! print out contact info and also make no initial contact an error
dmpoption,emat,no             ! Don't combine emat file for DANSYS
dmpoption,esav,no             ! Don't combine esav file for DANSYS
nldiag,cont,iter           ! print out contact info each equilibrium iteration
rescontrol,define,last,last,,dele	   ! Program Controlled
/com,****************************************************
/com,******************* SOLVE FOR LS 1 OF 1 ****************
esel,s,type,,2
nsle
sfe,all,1,pres,1,%_loadvari67x%
sfe,all,2,pres,1,%_loadvari67y%
sfe,all,3,pres,1,%_loadvari67z%
nsel,all
esel,all
autots,on                  ! Workbench Program Controlled automatic time stepping
nsub,1,10,1                ! due to presence of general nonlinear
time,1.
outres,erase
outres,all,none
outres,nsol,all
outres,rsol,all
outres,strs,all
outres,epel,all
outres,eppl,all
stabilize,off                   ! Stabilization turned OFF by user
! *********** WB SOLVE COMMAND ***********
! check interactive state
*get,ANSINTER_,active,,int
*if,ANSINTER_,ne,0,then
/eof
*endif
solve
/com *************** Write FE CONNECTORS *********
CEWRITE,file,ce,,INTE
/com,****************************************************
/com,*************** FINISHED SOLVE FOR LS 1 *************
/post1
! ****** Begin Command Snippet ******
!   Commands inserted into this file will be executed immediately after the ANSYS /POST1 command.

!   Active UNIT system in Workbench when this object was created:  Metric (m, kg, N, s, V, A)
!   NOTE:  Any data that requires units (such as mass) is assumed to be in the consistent solver unit system.
!                See Solving Units in the help system for more information.


!/graphics, power
set, first
/efacet,2
*get,my_nodeCount,NODE,0,COUNT
/output,nodalSolution,txt
/format,,ES,15,5,my_nodeCount*4
prnsol, s, comp


! ****** End   Command Snippet ******
! ****** Begin Command Snippet ******
!   Commands inserted into this file will be executed immediately after the ANSYS /POST1 command.

!   Active UNIT system in Workbench when this object was created:  Metric (m, kg, N, s, V, A)
!   NOTE:  Any data that requires units (such as mass) is assumed to be in the consistent solver unit system.
!                See Solving Units in the help system for more information.


!   Commands inserted into this file will be executed immediately after the ANSYS /POST1 command.

!   Active UNIT system in Workbench when this object was created:  Metric (m, kg, N, s, V, A)
!   NOTE:  Any data that requires units (such as mass) is assumed to be in the consistent solver unit system.
!                See Solving Units in the help system for more information.


!   Commands inserted into this file will be executed immediately after the ANSYS /POST1 command.

!   Active UNIT system in Workbench when this object was created:  Metric (m, kg, N, s, V, A)
!   NOTE:  Any data that requires units (such as mass) is assumed to be in the consistent solver unit system.
!                See Solving Units in the help system for more information.


SET,LAST
*get,my_maxNode,NODE,0,NUM,MAX
*get,my_minNode,NODE,0,NUM,MIN
*get,my_nodeCount,NODE,0,COUNT
*DIM,my_S,,my_nodeCount
*cfopen,nodeInfo,txt
*vwrite,my_minNode
(ES15.7)
*vwrite,my_maxNode
(ES15.7)
*cfclos
*vget,my_S(1),NODE,my_minNode,S,X
*cfopen,sx,txt
*vwrite,my_S(1)
(ES15.7)
*cfclos
*vget,my_S(1),NODE,my_minNode,S,Y
*cfopen,sy,txt
*vwrite,my_S(1)
(ES15.7)
*cfclos
*vget,my_S(1),NODE,my_minNode,S,Z
*cfopen,sz,txt
*vwrite,my_S(1)
(ES15.7)
*cfclos
*vget,my_S(1),NODE,my_minNode,S,XY
*cfopen,sxy,txt
*vwrite,my_S(1)
(ES15.7)
*cfclos
*vget,my_S(1),NODE,my_minNode,S,YZ
*cfopen,syz,txt
*vwrite,my_S(1)
(ES15.7)
*cfclos
*vget,my_S(1),NODE,my_minNode,S,XZ
*cfopen,sxz,txt
*vwrite,my_S(1)
(ES15.7)
*cfclos
*DIM,nodeArray,,my_nodeCount,4
*vget,nodeArray(1,1),NODE,my_minNode,LOC,X
*vget,nodeArray(1,2),NODE,my_minNode,LOC,Y
*vget,nodeArray(1,3),NODE,my_minNode,LOC,Z
*cfopen,nodex,txt
*vwrite,nodeArray(1,1)
(ES15.7)
*cfclos
*cfopen,nodey,txt
*vwrite,nodeArray(1,2)
(ES15.7)
*cfclos
*cfopen,nodez,txt
*vwrite,nodeArray(1,3)
(ES15.7)
*cfclos


! ****** End   Command Snippet ******
fini
