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/batch
! ANSYS input file written by Workbench version 18.2 RELEASE
! File used for geometry attach: E:\OneDrive - UNSW\University\Year 4 Semester 1\MMAN4010\MALAB FEA LoadPath Khan only\Uni\19.10.17\Standard Hole\Standard Hole_files\dp0\Geom-1\DM\Geom-1.agdb
/title,Standard Hole--Static Structural (E5)
/com,--- Data in consistent NMM units. See Solving Units in the help system for more information.
/units,MPA
/prep7
! Turn off shape checking because checks already performed inside WB mesher.
! See help system for more information.
SHPP,OFF,,NOWARN
etcon,set             ! allow ANSYS to choose best KEYOP's for 180x elements
/com,*********** Nodes for the whole assembly ***********
nblock,3,,10805
(1i9,3e20.9e3)
        1    5.922452218E+001    1.638960608E+001   -7.000000000E+000
        2    5.922452218E+001    1.638960608E+001   -6.500000000E+000
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-1
/com,*********** Elements for Body 1 "Solid" ***********
et,1,185
eblock,19,solid,,3240
(19i9)
        1        1        1        1        0        0        0        0        8        0        1       59     1335     1509     1480     2848     2804     2798     2799
        1        1        1        1        0        0        0        0        8        0        2       59     1480     1509     1335       60     1481     1510     1336
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-1
/com,*********** Elements for Body 2 "Solid" ***********
et,2,185
eblock,19,solid,,1016
(19i9)
        2        2        2        2        0        0        0        0        8        0     3241     3814     4414     4411     4408     5332     5132     5133     5134
        2        2        2        2        0        0        0        0        8        0     3242     3814     4408     4411     4414     3815     4409     4412     4415
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-1
/com,*********** Elements for Body 3 "Solid" ***********
et,3,185
eblock,19,solid,,1100
(19i9)
        3        3        2        3        0        0        0        0        8        0     4257     4495     4579     4735     4582     5542     5514     5462     5513
        3        3        2        3        0        0        0        0        8        0     4258     4495     4582     4735     4579     4496     4583     4736     4580
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-1
/com,*********** Elements for Body 4 "Solid" ***********
et,4,185
eblock,19,solid,,1100
(19i9)
        4        4        4        4        0        0        0        0        8        0     5357     6769     7381     7303     7054     8368     8164     8190     8273
        4        4        4        4        0        0        0        0        8        0     5358     6769     7054     7303     7381     6770     7055     7304     7382
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-1
/com,*********** Elements for Body 5 "Solid" ***********
et,5,185
eblock,19,solid,,1096
(19i9)
        5        5        4        5        0        0        0        0        8        0     6457     7456     7606     7474     8083     8596     8546     8590     8387
        5        5        4        5        0        0        0        0        8        0     6458     7456     8083     7474     7606     7457     8084     7475     7607
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-1
/com,*********** Send User Defined Coordinate System(s) ***********
csys,0
toffst,273.15,  ! Temperature offset from absolute zero
/com,*********** Set Reference Temperature ***********
tref,22.
/com,*********** Send Materials ***********
MP,DENS,1,7.85e-09,	! tonne mm^-3
MP,ALPX,1,1.2e-05,	! C^-1
MP,C,1,434000000,	! mm^2 s^-2 C^-1
MP,KXX,1,60.5,	! tonne mm s^-3 C^-1
MP,RSVX,1,0.00017,	! ohm mm
MP,EX,1,200000,	! tonne s^-2 mm^-1
MP,NUXY,1,0.3,
MP,MURX,1,10000,

MP,DENS,2,7.85e-09,	! tonne mm^-3
MP,ALPX,2,1.2e-05,	! C^-1
MP,C,2,434000000,	! mm^2 s^-2 C^-1
MP,KXX,2,60.5,	! tonne mm s^-3 C^-1
MP,RSVX,2,0.00017,	! ohm mm
MP,EX,2,200000,	! tonne s^-2 mm^-1
MP,NUXY,2,0.3,
MP,MURX,2,10000,

MP,DENS,3,7.85e-09,	! tonne mm^-3
MP,ALPX,3,1.2e-05,	! C^-1
MP,C,3,434000000,	! mm^2 s^-2 C^-1
MP,KXX,3,60.5,	! tonne mm s^-3 C^-1
MP,RSVX,3,0.00017,	! ohm mm
MP,EX,3,200000,	! tonne s^-2 mm^-1
MP,NUXY,3,0.3,
MP,MURX,3,10000,

MP,DENS,4,7.85e-09,	! tonne mm^-3
MP,ALPX,4,1.2e-05,	! C^-1
MP,C,4,434000000,	! mm^2 s^-2 C^-1
MP,KXX,4,60.5,	! tonne mm s^-3 C^-1
MP,RSVX,4,0.00017,	! ohm mm
MP,EX,4,200000,	! tonne s^-2 mm^-1
MP,NUXY,4,0.3,
MP,MURX,4,10000,

MP,DENS,5,7.85e-09,	! tonne mm^-3
MP,ALPX,5,1.2e-05,	! C^-1
MP,C,5,434000000,	! mm^2 s^-2 C^-1
MP,KXX,5,60.5,	! tonne mm s^-3 C^-1
MP,RSVX,5,0.00017,	! ohm mm
MP,EX,5,200000,	! tonne s^-2 mm^-1
MP,NUXY,5,0.3,
MP,MURX,5,10000,

!************************* Model Summary ********************
!Solid,	Structural Steel,	matid,	1
!Solid,	Structural Steel,	matid,	2
!Solid,	Structural Steel,	matid,	3
!Solid,	Structural Steel,	matid,	4
!Solid,	Structural Steel,	matid,	5
!************************* End Model Summary ********************
/com,*********** Create Contact "Frictionless - Solid To Solid" ***********
*set,tid,7
*set,cid,6
r,tid
r,cid
et,tid,170
et,cid,174
eblock,10,,,128
(15i9)
     7553        7        7        7        0     3325     3298     3771     3772
     7554        7        7        7        0     3352     3325     3772     3773
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-1
eblock,10,,,128
(15i9)
     7681        6        6        6        0     3325     3298     3771     3772
     7682        6        6        6        0     3352     3325     3772     3773
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-1
eblock,10,,,56
(15i9)
     7809        6        7        6        0     6246     6189     6228     6229
     7810        6        7        6        0     6247     6202     6189     6246
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-1
eblock,10,,,56
(15i9)
     7865        7        6        7        0     6246     6189     6228     6229
     7866        7        6        7        0     6247     6202     6189     6246
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-1
keyo,cid,8,2               ! auto create asymmetric contact (from Program Controlled setting)
keyo,cid,10,0              ! adjust contact stiffness each NR iteration (from Program Controlled setting)
keyo,cid,12,0              ! standard contact
keyo,cid,2,0               ! augmented Lagrange (from Program Controlled setting)
keyo,cid,4,0               ! on Gauss point (from Program Controlled setting)
keyo,cid,9,0               ! use real geometry with stepped effects
keyo,cid,7,0               ! No Prediction
rmod,tid,3,1. ! FKN
rmod,tid,5,0.          ! ICONT
rmod,tid,6,0.        ! PINB
rmod,tid,10,0.        ! CNOF
rmod,tid,12,0.        ! FKT
rmod,tid,36,32         ! WB DSID
rmod,cid,3,1.      ! FKN
rmod,cid,5,0.          ! ICONT
rmod,cid,6,0.        ! PINB
rmod,cid,10,0.        ! CNOF
rmod,cid,12,0.        ! FKT
rmod,cid,36,32         ! WB DSID
/com,*********** Create Contact "Frictionless - Solid To Solid" ***********
*set,tid,9
*set,cid,8
r,tid
r,cid
et,tid,170
et,cid,174
eblock,10,,,128
(15i9)
     7921        9        9        9        0     3325     3298     3771     3772
     7922        9        9        9        0     3352     3325     3772     3773
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-1
eblock,10,,,128
(15i9)
     8049        8        8        8        0     3325     3298     3771     3772
     8050        8        8        8        0     3352     3325     3772     3773
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-1
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eblock,10,,,56
(15i9)
     8233        9        8        9        0     6243     6561     6612     6242
     8234        9        8        9        0     6244     6574     6561     6243
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-1
keyo,cid,8,2               ! auto create asymmetric contact (from Program Controlled setting)
keyo,cid,10,0              ! adjust contact stiffness each NR iteration (from Program Controlled setting)
keyo,cid,12,0              ! standard contact
keyo,cid,2,0               ! augmented Lagrange (from Program Controlled setting)
keyo,cid,4,0               ! on Gauss point (from Program Controlled setting)
keyo,cid,9,0               ! use real geometry with stepped effects
keyo,cid,7,0               ! No Prediction
rmod,tid,3,1. ! FKN
rmod,tid,5,0.          ! ICONT
rmod,tid,6,0.        ! PINB
rmod,tid,10,0.        ! CNOF
rmod,tid,12,0.        ! FKT
rmod,tid,36,35         ! WB DSID
rmod,cid,3,1.      ! FKN
rmod,cid,5,0.          ! ICONT
rmod,cid,6,0.        ! PINB
rmod,cid,10,0.        ! CNOF
rmod,cid,12,0.        ! FKT
rmod,cid,36,35         ! WB DSID
/com,*********** Create Contact "Frictionless - Solid To Solid" ***********
*set,tid,11
*set,cid,10
r,tid
r,cid
et,tid,170
et,cid,174
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eblock,10,,,56
(15i9)
     8601       11       10       11        0     9300     9244     8865     8895
     8602       11       10       11        0     9299     9257     9244     9300
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-1
keyo,cid,8,2               ! auto create asymmetric contact (from Program Controlled setting)
keyo,cid,10,0              ! adjust contact stiffness each NR iteration (from Program Controlled setting)
keyo,cid,12,0              ! standard contact
keyo,cid,2,0               ! augmented Lagrange (from Program Controlled setting)
keyo,cid,4,0               ! on Gauss point (from Program Controlled setting)
keyo,cid,9,0               ! use real geometry with stepped effects
keyo,cid,7,0               ! No Prediction
rmod,tid,3,1.       ! FKN
rmod,tid,5,0.          ! ICONT
rmod,tid,6,0.        ! PINB
rmod,tid,10,0.        ! CNOF
rmod,tid,12,0.        ! FKT
rmod,tid,36,38         ! WB DSID
rmod,cid,3,1.      ! FKN
rmod,cid,5,0.          ! ICONT
rmod,cid,6,0.        ! PINB
rmod,cid,10,0.        ! CNOF
rmod,cid,12,0.        ! FKT
rmod,cid,36,38         ! WB DSID
/com,*********** Create Contact "Frictionless - Solid To Solid" ***********
*set,tid,13
*set,cid,12
r,tid
r,cid
et,tid,170
et,cid,174
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eblock,10,,,56
(15i9)
     8969       13       12       13        0     9298     9616     9655     9284
     8970       13       12       13        0     9299     9629     9616     9298
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-1
keyo,cid,8,2               ! auto create asymmetric contact (from Program Controlled setting)
keyo,cid,10,0              ! adjust contact stiffness each NR iteration (from Program Controlled setting)
keyo,cid,12,0              ! standard contact
keyo,cid,2,0               ! augmented Lagrange (from Program Controlled setting)
keyo,cid,4,0               ! on Gauss point (from Program Controlled setting)
keyo,cid,9,0               ! use real geometry with stepped effects
keyo,cid,7,0               ! No Prediction
rmod,tid,3,1.       ! FKN
rmod,tid,5,0.          ! ICONT
rmod,tid,6,0.        ! PINB
rmod,tid,10,0.        ! CNOF
rmod,tid,12,0.        ! FKT
rmod,tid,36,41         ! WB DSID
rmod,cid,3,1.      ! FKN
rmod,cid,5,0.          ! ICONT
rmod,cid,6,0.        ! PINB
rmod,cid,10,0.        ! CNOF
rmod,cid,12,0.        ! FKT
rmod,cid,36,41         ! WB DSID
/com,*********** Create Contact "Frictionless - Solid To Solid" ***********
*set,tid,15
*set,cid,14
r,tid
r,cid
et,tid,170
et,cid,174
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eblock,10,,,159
(15i9)
     9462       15       14       15        0     8546     8590     8387     8596
     9463       15       14       15        0     8389     8596     8387     8396
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-1
keyo,cid,8,2               ! auto create asymmetric contact (from Program Controlled setting)
keyo,cid,10,0              ! adjust contact stiffness each NR iteration (from Program Controlled setting)
keyo,cid,12,0              ! standard contact
keyo,cid,2,0               ! augmented Lagrange (from Program Controlled setting)
keyo,cid,4,0               ! on Gauss point (from Program Controlled setting)
keyo,cid,9,0               ! use real geometry with stepped effects
keyo,cid,7,0               ! No Prediction
rmod,tid,3,1. ! FKN
rmod,tid,5,0.          ! ICONT
rmod,tid,6,0.        ! PINB
rmod,tid,10,0.        ! CNOF
rmod,tid,12,0.        ! FKT
rmod,tid,36,44         ! WB DSID
rmod,cid,3,1.      ! FKN
rmod,cid,5,0.          ! ICONT
rmod,cid,6,0.        ! PINB
rmod,cid,10,0.        ! CNOF
rmod,cid,12,0.        ! FKT
rmod,cid,36,44         ! WB DSID
/com,*********** Create Contact "Frictionless - Solid To Solid" ***********
*set,tid,17
*set,cid,16
r,tid
r,cid
et,tid,170
et,cid,174
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eblock,10,,,159
(15i9)
    10098       17       16       17        0     8164     8190     8273     8368
    10099       17       16       17        0     8193     8368     8273     8200
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-1
keyo,cid,8,2               ! auto create asymmetric contact (from Program Controlled setting)
keyo,cid,10,0              ! adjust contact stiffness each NR iteration (from Program Controlled setting)
keyo,cid,12,0              ! standard contact
keyo,cid,2,0               ! augmented Lagrange (from Program Controlled setting)
keyo,cid,4,0               ! on Gauss point (from Program Controlled setting)
keyo,cid,9,0               ! use real geometry with stepped effects
keyo,cid,7,0               ! No Prediction
rmod,tid,3,1. ! FKN
rmod,tid,5,0.          ! ICONT
rmod,tid,6,0.        ! PINB
rmod,tid,10,0.        ! CNOF
rmod,tid,12,0.        ! FKT
rmod,tid,36,47         ! WB DSID
rmod,cid,3,1.      ! FKN
rmod,cid,5,0.          ! ICONT
rmod,cid,6,0.        ! PINB
rmod,cid,10,0.        ! CNOF
rmod,cid,12,0.        ! FKT
rmod,cid,36,47         ! WB DSID
nsel,all
esel,all
/com,********* Frictionless Supports Y *********
CMBLOCK,_FRICSUY,NODE,      868
(8i10)
      2946      2947      2948      2949      2950      2951      2952      2953
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cmsel,s,_FRICSUY
d,all,uy,0
nsel,all
/com,********* Frictionless Supports Z *********
CMBLOCK,_FRICSUZ,NODE,      868
(8i10)
      2946      2947      2948      2949      2950      2951      2952      2953
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cmsel,s,_FRICSUZ
d,all,uz,0
nsel,all
/com,******* Constant Zero Displacement Y *******
CMBLOCK,_DISPZEROUY,NODE,       10
(8i10)
      5853      6277      6278      6279      6280      8918      9236      9237
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cmsel,s,_DISPZEROUY
d,all,uy,0
nsel,all
/com,******* Constant Zero Displacement Z *******
CMBLOCK,_DISPZEROUZ,NODE,       28
(8i10)
      5853      5855      5856      5857      5858      5859      5860      5861
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cmsel,s,_DISPZEROUZ
d,all,uz,0
nsel,all
/com,*********** Node Rotations ***********
nmod,2946,,,,-180.,0.,-180.
nmod,2947,,,,-167.142857142857,0.,-180.
nmod,2948,,,,-154.285714285714,0.,-180.
nmod,2949,,,,-141.428571428571,0.,-180.
nmod,2950,,,,-128.571428571429,0.,-180.
nmod,2951,,,,-115.714285714286,0.,-180.
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nmod,3813,,,,154.285714285714,0.,180.
/com,*********** Create Displacement Tables and Functions ******

*DIM,_loadvari171xp,TABLE,2,1,1,TIME,
! Time values
_loadvari171xp(1,0,1) = 0.
_loadvari171xp(2,0,1) = 1.
! Load values
_loadvari171xp(1,1,1) = 0.
_loadvari171xp(2,1,1) = 0.1


*DIM,_loadvari171xn,TABLE,2,1,1,TIME,
! Time values
_loadvari171xn(1,0,1) = 0.
_loadvari171xn(2,0,1) = 1.
! Load values
_loadvari171xn(1,1,1) = -0.
_loadvari171xn(2,1,1) = -0.1


*DIM,_loadvari173xp,TABLE,2,1,1,TIME,
! Time values
_loadvari173xp(1,0,1) = 0.
_loadvari173xp(2,0,1) = 1.
! Load values
_loadvari173xp(1,1,1) = 0.
_loadvari173xp(2,1,1) = -0.1


*DIM,_loadvari173xn,TABLE,2,1,1,TIME,
! Time values
_loadvari173xn(1,0,1) = 0.
_loadvari173xn(2,0,1) = 1.
! Load values
_loadvari173xn(1,1,1) = -0.
_loadvari173xn(2,1,1) = 0.1

fini
/com,****************************************************************************
/com,*************************    SOLUTION       ********************************
/com,****************************************************************************
/solu
antype,0                   ! static analysis
eqsl,pcg,1e-8,,,,,,1
cntr,print,1               ! print out contact info and also make no initial contact an error
dmpoption,emat,no             ! Don't combine emat file for DANSYS
dmpoption,esav,no             ! Don't combine esav file for DANSYS
nldiag,cont,iter           ! print out contact info each equilibrium iteration
rescontrol,define,last,last,,dele	   ! Program Controlled
/com,****************************************************
/com,******************* SOLVE FOR LS 1 OF 1 ****************
/com,*** Set Displacements ***
CMBLOCK,_CM171UX_XP,NODE,       85
(8i10)
      5801      5802      5803      5804      5805      5806      5807      5808
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cmsel,s,_CM171UX_XP
d,all,ux,%_loadvari171xp%
CMBLOCK,_CM173UX_XP,NODE,       85
(8i10)
      8878      8879      8880      8881      8882      8883      8884      8885
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cmsel,s,_CM173UX_XP
d,all,ux,%_loadvari173xp%
nsel,all

/com,*** Component For All Non-Zero UX Displacements ***
cmsel,s,_CM171ux_xp
cmsel,a,_CM173ux_xp
cm,_DISPNONZEROUX,NODE
nsel,all

autots,on                  ! Workbench Program Controlled automatic time stepping
nsub,1,10,1                ! due to presence of general nonlinear
time,1.
outres,erase
outres,all,none
outres,nsol,all
outres,rsol,all
outres,strs,all
outres,epel,all
outres,eppl,all
stabilize,off                   ! Stabilization turned OFF by user
! ****** Begin Command Snippet ******
!   Commands inserted into this file will be executed just prior to the ANSYS SOLVE command.
!   These commands may supersede command settings set by Workbench.

!   Active UNIT system in Workbench when this object was created:  Metric (mm, kg, N, s, mV, mA)
!   NOTE:  Any data that requires units (such as mass) is assumed to be in the consistent solver unit system.
!                See Solving Units in the help system for more information.


! ****** End   Command Snippet ******
! *********** WB SOLVE COMMAND ***********
! check interactive state
*get,ANSINTER_,active,,int
*if,ANSINTER_,ne,0,then
/eof
*endif
solve
/com *************** Write FE CONNECTORS *********
CEWRITE,file,ce,,INTE
/com,****************************************************
/com,*************** FINISHED SOLVE FOR LS 1 *************
*get,_PCGITER,active,,solu,cgiter
/post1
! ****** Begin Command Snippet ******
!   Commands inserted into this file will be executed immediately after the ANSYS /POST1 command.

!   Active UNIT system in Workbench when this object was created:  Metric (mm, kg, N, s, mV, mA)
!   NOTE:  Any data that requires units (such as mass) is assumed to be in the consistent solver unit system.
!                See Solving Units in the help system for more information.


set, first
/efacet,2
*get,my_nodeCount,NODE,0,COUNT
/output,nodalSolution,txt
/format,,ES,15,5,my_nodeCount*4
prnsol, s, comp


! ****** End   Command Snippet ******
! ****** Begin Command Snippet ******
!   Commands inserted into this file will be executed immediately after the ANSYS /POST1 command.

!   Active UNIT system in Workbench when this object was created:  Metric (mm, kg, N, s, mV, mA)
!   NOTE:  Any data that requires units (such as mass) is assumed to be in the consistent solver unit system.
!                See Solving Units in the help system for more information.


SET,LAST
*get,my_maxNode,NODE,0,NUM,MAX
*get,my_minNode,NODE,0,NUM,MIN
*get,my_nodeCount,NODE,0,COUNT

*DIM,my_S,,my_nodeCount
*cfopen,nodeInfo,txt
*vwrite,my_minNode
(ES15.7)
*vwrite,my_maxNode
(ES15.7)
*cfclos
*vget,my_S(1),NODE,my_minNode,S,X
*cfopen,sx,txt
*vwrite,my_S(1)
(ES15.7)
*cfclos
*vget,my_S(1),NODE,my_minNode,S,Y
*cfopen,sy,txt
*vwrite,my_S(1)
(ES15.7)
*cfclos
*vget,my_S(1),NODE,my_minNode,S,Z
*cfopen,sz,txt
*vwrite,my_S(1)
(ES15.7)
*cfclos
*vget,my_S(1),NODE,my_minNode,S,XY
*cfopen,sxy,txt
*vwrite,my_S(1)
(ES15.7)
*cfclos
*vget,my_S(1),NODE,my_minNode,S,YZ
*cfopen,syz,txt
*vwrite,my_S(1)
(ES15.7)
*cfclos
*vget,my_S(1),NODE,my_minNode,S,XZ
*cfopen,sxz,txt
*vwrite,my_S(1)
(ES15.7)
*cfclos
*DIM,nodeArray,,my_nodeCount,4
*vget,nodeArray(1,1),NODE,my_minNode,LOC,X
*vget,nodeArray(1,2),NODE,my_minNode,LOC,Y
*vget,nodeArray(1,3),NODE,my_minNode,LOC,Z
*cfopen,nodex,txt
*vwrite,nodeArray(1,1)
(ES15.7)
*cfclos
*cfopen,nodey,txt
*vwrite,nodeArray(1,2)
(ES15.7)
*cfclos
*cfopen,nodez,txt
*vwrite,nodeArray(1,3)
(ES15.7)
*cfclos


! ****** End   Command Snippet ******
! ****** Begin Command Snippet ******
!   Commands inserted into this file will be executed immediately after the ANSYS /POST1 command.

!   Active UNIT system in Workbench when this object was created:  Metric (mm, kg, N, s, mV, mA)
!   NOTE:  Any data that requires units (such as mass) is assumed to be in the consistent solver unit system.
!                See Solving Units in the help system for more information.

set, last
/prep
esel,s,type,,186
*get,eNum,elem,,count
*cfopen,elInfo,txt
*vwrite,eNum
(F10.3)
*cfclos

! ****** End   Command Snippet ******
fini
