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/batch
! ANSYS input file written by Workbench version 18.2 RELEASE
! File used for geometry attach: E:\OneDrive - UNSW\University\Year 4 Semester 2\MMAN4020\GUI Dev\Models\Cube Model\Simple Cube_files\dp0\SYS-1\DM\SYS-1.agdb
/title,Simple Cube--Static Structural (B5)
/com,--- Data in consistent NMM units. See Solving Units in the help system for more information.
/units,MPA
/prep7
! Turn off shape checking because checks already performed inside WB mesher.
! See help system for more information.
SHPP,OFF,,NOWARN
etcon,set             ! allow ANSYS to choose best KEYOP's for 180x elements
/com,*********** Nodes for the whole assembly ***********
nblock,3,,2861
(1i9,3e20.9e3)
        1    0.000000000E+000    5.000000000E+001    0.000000000E+000
        2    0.000000000E+000    0.000000000E+000    0.000000000E+000
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-1
/com,*********** Elements for Body 1 "Surface Body" ***********
et,1,182
keyo,1,3,3
eblock,19,solid,,2500
(19i9)
        1        1        1        1        0        0        0        0        4        0        1     2455        5     2552        3
        1        1        1        1        0        0        0        0        4        0        2     2456       54        5     2455
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-1
/com,*********** Send User Defined Coordinate System(s) ***********
csys,0
toffst,273.15,  ! Temperature offset from absolute zero
/com,*********** Set Reference Temperature ***********
tref,22.
/com,*********** Send Materials ***********
MP,DENS,1,7.85e-09,	! tonne mm^-3
MP,ALPX,1,1.2e-05,	! C^-1
MP,C,1,434000000,	! mm^2 s^-2 C^-1
MP,KXX,1,60.5,	! tonne mm s^-3 C^-1
MP,RSVX,1,0.00017,	! ohm mm
MP,EX,1,200000,	! tonne s^-2 mm^-1
MP,NUXY,1,0.3,
MP,MURX,1,10000,

/com,*********** Send Sheet Properties ***********
r,1,1000.
!************************* Model Summary ********************
!Surface Body,	Structural Steel,	matid,	1
!************************* End Model Summary ********************
CMBLOCK,Y_FORCE ,NODE,       17
(8i10)
         1      2439      2440      2441      2442      2443      2444      2445
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/com,******* Constant Zero Displacement X *******
CMBLOCK,_DISPZEROUX,NODE,       51
(8i10)
         2         3      2504      2505      2506      2507      2508      2509
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cmsel,s,_DISPZEROUX
d,all,ux,0
nsel,all
/com,******* Constant Zero Displacement Y *******
CMBLOCK,_DISPZEROUY,NODE,       51
(8i10)
         2         3      2504      2505      2506      2507      2508      2509
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cmsel,s,_DISPZEROUY
d,all,uy,0
nsel,all
/com,*********** Define Vertex Force Using Follower Elements ***********
et,2,201
keyo,2,1,1           ! Keep the direction constant
keyo,2,2,1           ! Apply Forces only, not moment
mat,2
real,2
type,2
en,2501,4
r,2
rmod,2,1,1.0,              ! FX
mat,3
real,3
type,2
en,2502,4
r,3
rmod,3,2,1.0,              ! FY

*DIM,_loadvari27x,TABLE,2,1,1,TIME,
! Time values
_loadvari27x(1,0,1) = 0.
_loadvari27x(2,0,1) = 1.
! Load values
_loadvari27x(1,1,1) = 0.
_loadvari27x(2,1,1) = 100.


*DIM,_loadvari27y,TABLE,2,1,1,TIME,
! Time values
_loadvari27y(1,0,1) = 0.
_loadvari27y(2,0,1) = 1.
! Load values
_loadvari27y(1,1,1) = 0.
_loadvari27y(2,1,1) = 0.

/com,*********** Create Direct FE , Forces ****
CMBLOCK,_CM40F  ,NODE,       17
(8i10)
         1      2439      2440      2441      2442      2443      2444      2445
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
*DIM,_loadvari40x,TABLE,2,1,1,TIME,
! Time values
_loadvari40x(1,0,1) = 0.
_loadvari40x(2,0,1) = 1.
! Load values
_loadvari40x(1,1,1) = 0.
_loadvari40x(2,1,1) = 0.


*DIM,_loadvari40y,TABLE,2,1,1,TIME,
! Time values
_loadvari40y(1,0,1) = 0.
_loadvari40y(2,0,1) = 1.
! Load values
_loadvari40y(1,1,1) = 0.
_loadvari40y(2,1,1) = 5000.


*DIM,_loadvari40z,TABLE,1,1,1,TIME,
! Time values
_loadvari40z(1,0,1) = 1.
! Load values
_loadvari40z(1,1,1) = 0.

fini
/com,****************************************************************************
/com,*************************    SOLUTION       ********************************
/com,****************************************************************************
/solu
antype,0                   ! static analysis
eqsl,sparse,,,,,1
cntr,print,1               ! print out contact info and also make no initial contact an error
dmpoption,emat,no             ! Don't combine emat file for DANSYS
dmpoption,esav,no             ! Don't combine esav file for DANSYS
nldiag,cont,iter           ! print out contact info each equilibrium iteration
rescontrol,,none                 ! Do not keep any restart files
/com,****************************************************
/com,******************* SOLVE FOR LS 1 OF 1 ****************
esel,s,real,,2
sfe,all,1,pres,1,%_loadvari27x%
esel,s,real,,3
sfe,all,1,pres,1,%_loadvari27y%
esel,all
/com,**** Set Direct FE , Forces ****
f,_CM40F,fx,%_loadvari40x%
f,_CM40F,fy,%_loadvari40y%
f,_CM40F,fz,%_loadvari40z%
nsub,1,1,1
time,1.
outres,erase
outres,all,none
outres,nsol,all
outres,rsol,all
outres,strs,all
outres,epel,all
outres,eppl,all
stabilize,off                   ! Stabilization turned OFF by user
! *********** WB SOLVE COMMAND ***********
! check interactive state
*get,ANSINTER_,active,,int
*if,ANSINTER_,ne,0,then
/eof
*endif
solve
/com *************** Write FE CONNECTORS *********
CEWRITE,file,ce,,INTE
/com,****************************************************
/com,*************** FINISHED SOLVE FOR LS 1 *************
/post1
! ****** Begin Command Snippet ******

SET,LAST
*get,my_maxNode,NODE,0,NUM,MAX
*get,my_minNode,NODE,0,NUM,MIN
*cfopen,nodeInfo,txt
*vwrite,my_minNode
(ES15.7)
*vwrite,my_maxNode
(ES15.7)
*cfclos


! ****** End   Command Snippet ******
! ****** Begin Command Snippet ******
set, first
/efacet,2
*get,my_nodeCount,NODE,0,COUNT
/output,nodalSolution,txt
/format,,ES,15,5,my_nodeCount*4
prnsol, s, comp


! ****** End   Command Snippet ******
fini
